# Расчет количества результирующих пакетов из множества сигналов S при опросе по n
# сигналов за цикл с сочетанием их по k
S := 14000
n := 30
k := 5
d := floor(S/n)
r := S - d*n
R := d*sum(n!/(i!*(n - i)!), i = 1 .. k)
R := R + sum(r!/(i!*(r - i)!), i = 1 .. k)
R = 81308875
